// ---------------------------------------------------------------------
// Medidores
// ---------------------------------------------------------------------

// New EnergyMeter.Subestacao element=Transformer.Subestacao terminal=1
New energymeter.m1 line.650632 1
