Clear

Compile Master_Trafo.dss


//---------------------------------------------------------------------------//
// TAP = 0.95
//---------------------------------------------------------------------------//
! Transformer.Trafo.Taps = [1 0.95]
!
! Set ControlMode=OFF
! Set Mode=Daily StepSize=1.0h Number=24
! Solve
!
! Plot monitor object= tensao_carga2 channels=(1 3 5 )

//---------------------------------------------------------------------------//
// TAP = 1
//---------------------------------------------------------------------------//
Transformer.Trafo.Taps = [1 1]

Set ControlMode=OFF
Set Mode=Daily StepSize=1.0h Number=24
Solve

! Plot monitor object= tensao_carga2 channels=(1 3 5 )

//---------------------------------------------------------------------------//
// TAP = 1.05
//---------------------------------------------------------------------------//
! Transformer.Trafo.Taps = [1 1.05]
!
! Set ControlMode=OFF
! Set Mode=Daily StepSize=1.0h Number=24
! Solve
!
! Plot monitor object= tensao_carga2 channels=(1 3 5 )

!Plot monitor object= tensao_carga2 channels=(1 3 5 )
!Plot Profile
